# OpenSim document version 40000
InverseKinematicsTool generic:
  constraint_weight: Inf
  accuracy: 1e-5
  time_range: -Inf Inf
  report_errors: true
  report_marker_locations: false
  IKTaskSet:
    IKMarkerTask C7_study: apply=true weight=5
    IKMarkerTask r_shoulder_study: apply=true weight=5
    IKMarkerTask L_shoulder_study: apply=true weight=5
    IKMarkerTask r.ASIS_study: apply=true weight=25
    IKMarkerTask L.ASIS_study: apply=true weight=25
    IKMarkerTask r.PSIS_study: apply=true weight=25
    IKMarkerTask L.PSIS_study: apply=true weight=25
    IKMarkerTask RKnee: apply=true weight=30
    IKMarkerTask RAnkle: apply=true weight=30
    IKMarkerTask RSmallToe: apply=true weight=30
    IKMarkerTask RBigToe: apply=true weight=30
    IKMarkerTask RHeel: apply=true weight=60
    IKMarkerTask LKnee: apply=true weight=30
    IKMarkerTask LAnkle: apply=true weight=30
    IKMarkerTask LSmallToe: apply=true weight=30
    IKMarkerTask LBigToe: apply=true weight=60
    IKMarkerTask LHeel: apply=true weight=30
    IKMarkerTask r_lelbow_study: apply=true weight=5
    IKMarkerTask L_lelbow_study: apply=true weight=5
    IKMarkerTask r_melbow_study: apply=true weight=5
    IKMarkerTask L_melbow_study: apply=true weight=5
    IKMarkerTask r_lwrist_study: apply=true weight=5
    IKMarkerTask L_lwrist_study: apply=true weight=5
    IKMarkerTask r_mwrist_study: apply=true weight=5
    IKMarkerTask L_mwrist_study: apply=true weight=5
    IKMarkerTask RHJC_study: apply=true weight=25
    IKMarkerTask LHJC_study: apply=true weight=25
