# OpenSim document version 40000
MarkerSet:
  Marker r.ASIS_study: pelvis (0.028 0.01 0.128)
  Marker L.ASIS_study: pelvis (0.028 0.01 -0.128)
  Marker r.PSIS_study: pelvis (-0.154 0.025 0.05)
  Marker L.PSIS_study: pelvis (-0.154 0.025 -0.05)
  Marker r_shoulder_study: torso (0 0.418 0.142)
  Marker L_shoulder_study: torso (0 0.418 -0.142)
  Marker C7_study: torso (-0.08 0.42 0.003)
  Marker r_lelbow_study: humerus_r (0.015 -0.28 0.04) fixed=true
  Marker r_melbow_study: humerus_r (0.00225 -0.286 -0.05) fixed=true
  Marker r_lwrist_study: radius_r (0.0005 -0.225 0.05) fixed=true
  Marker r_mwrist_study: radius_r (-0.022 -0.225 -0.022) fixed=true
  Marker L_lelbow_study: humerus_l (0.015 -0.28 -0.04) fixed=true
  Marker L_melbow_study: humerus_l (0.00225 -0.286 0.05) fixed=true
  Marker L_lwrist_study: radius_l (0.0005 -0.225 -0.05) fixed=true
  Marker L_mwrist_study: radius_l (-0.022 -0.225 0.022) fixed=true
  Marker RHJC_study: pelvis (-0.056276 -0.07849 0.07726)
  Marker LHJC_study: pelvis (-0.056276 -0.07849 -0.07726)
  Marker RKnee: femur_r (0.006915232 -0.3993278 -0.003470242) fixed=true
  Marker LKnee: femur_l (0.006915232 -0.3993278 0.003470242) fixed=true
  Marker RAnkle: tibia_r (-0.009852365 -0.3879878 0.0075) fixed=true
  Marker LAnkle: tibia_l (-0.009852365 -0.3879878 -0.0075) fixed=true
  Marker RHeel: calcn_r (0.008644627 0.01 -0.01195475) fixed=true
  Marker LHeel: calcn_l (0.008644627 0.01 0.01195475) fixed=true
  Marker RSmallToe: calcn_r (0.1891805 -0.003515242 0.03675293) fixed=true
  Marker LSmallToe: calcn_l (0.1891805 -0.003515242 -0.03675293) fixed=true
  Marker RBigToe: calcn_r (0.2116917 -0.001154251 -0.005533338) fixed=true
  Marker LBigToe: calcn_l (0.2116917 -0.001154251 0.005533338) fixed=true
