# OpenSim document version 40000
MarkerSet:
  Marker C7: torso (-0.08 0.42 0.003)
  Marker R_Shoulder: scapulaPhantom_r (-0.0076529 0.007483827 -0.02702078)
  Marker L_Shoulder: scapulaPhantom_l (-0.0076529 0.007483827 0.02702078)
  Marker R_Sternum: torso (0.046 0.385 0.025)
  Marker L_Sternum: torso (0.046 0.385 -0.025)
  Marker r.ASIS: pelvis (0.028 0.01 0.128)
  Marker L.ASIS: pelvis (0.028 0.01 -0.128)
  Marker r.PSIS: pelvis (-0.154 0.025 0.05)
  Marker L.PSIS: pelvis (-0.154 0.025 -0.05)
  Marker R_HJC: femur_r (0 0 0)
  Marker L_HJC: femur_l (0 0 0)
  Marker r_thigh1: femur_r (0.08 -0.324 0.0047)
  Marker r_thigh2: femur_r (0.08 -0.324 0.0047)
  Marker r_thigh3: femur_r (0.08 -0.324 0.0047)
  Marker r_thigh4: femur_r (0.08 -0.324 0.0047)
  Marker r_thigh5: femur_r (0.08 -0.324 0.0047)
  Marker r_knee: femur_r (0.008 -0.404 0.055)
  Marker r_mknee: femur_r (0.011 -0.401 -0.055)
  Marker r_shank_antsup: tibia_r (0.0104 -0.2322 0.0748)
  Marker r_sh2: tibia_r (0.0104 -0.2322 0.0748)
  Marker r_sh3: tibia_r (0.0104 -0.2322 0.0748)
  Marker r_sh4: tibia_r (0.0104 -0.2322 0.0748)
  Marker r_ankle: tibia_r (-0.01743173 -0.3850714 0.04727037)
  Marker r_mankle: tibia_r (0.006 -0.38 -0.038)
  Marker r_toe: calcn_r (0.1804591 0.01762133 0.001004512)
  Marker r_5meta: calcn_r (0.1358638 0.001114828 0.06143212)
  Marker r_calc: calcn_r (-0.0321615 0.01491079 -0.0111695)
  Marker L_thigh1: femur_l (0.08 -0.324 -0.0047)
  Marker L_thigh2: femur_l (0.08 -0.324 -0.0047)
  Marker L_thigh3: femur_l (0.08 -0.324 -0.0047)
  Marker L_thigh4: femur_l (0.08 -0.324 -0.0047)
  Marker L_knee: femur_l (0.008 -0.404 -0.055)
  Marker L_mknee: femur_l (0.011 -0.401 0.055)
  Marker L_ankle: tibia_l (-0.017 -0.385 -0.047)
  Marker L_shank_antsup: tibia_l (0.0125 -0.3196 -0.06)
  Marker L_sh2: tibia_l (0.0125 -0.3196 -0.06)
  Marker L_sh3: tibia_l (0.0125 -0.3196 -0.06)
  Marker L_mankle: tibia_l (0.006 -0.38 0.038)
  Marker L_toe: calcn_l (0.1804591 0.01762133 -0.001004512)
  Marker L_calc: calcn_l (-0.03 0.01459576 0.01)
  Marker L_5meta: calcn_l (0.1358638 0.001114828 -0.06143212)
  Marker R_elbow_med: humerus_r (0.005511308 -0.2781543 -0.04596903) fixed=true
  Marker R_elbow_lat: humerus_r (0.01046536 -0.2731899 0.04165469) fixed=true
  Marker R_wrist_radius: radius_r (-0.02965623 -0.2244783 0.03462701) fixed=true
  Marker R_wrist_ulna: radius_r (-0.02980336 -0.2253365 -0.01089353) fixed=true
  Marker L_elbow_med: humerus_l (0.005511308 -0.2781543 0.04596903) fixed=true
  Marker L_elbow_lat: humerus_l (0.01046536 -0.2731899 -0.04165469) fixed=true
  Marker L_wrist_radius: radius_l (-0.0354783 -0.2265841 -0.03585613) fixed=true
  Marker L_wrist_ulna: radius_l (-0.04018316 -0.2267243 0.005623399) fixed=true
