# OpenSim document version 40000
ScaleTool RajagopalModified2016_withArms:
  mass: 75.337 [kg]
  height: 1.89
  age: -1
  ModelScaler:
    apply: true
    scaling_order: measurements
    time_range: 3.41 3.66
    preserve_mass_distribution: true
    MeasurementSet:
      Measurement foot: apply=true
        MarkerPair: markers=(r_calc r_toe)
        MarkerPair: markers=(r_calc r_5meta)
        MarkerPair: markers=(L_calc L_toe)
        MarkerPair: markers=(L_calc L_5meta)
        BodyScale talus_r: axes=(X Y Z)
        BodyScale calcn_r: axes=(X Y Z)
        BodyScale toes_r: axes=(X Y Z)
        BodyScale talus_l: axes=(X Y Z)
        BodyScale calcn_l: axes=(X Y Z)
        BodyScale toes_l: axes=(X Y Z)
      Measurement tibia_r: apply=true
        MarkerPair: markers=(r_knee r_ankle)
        MarkerPair: markers=(r_mknee r_mankle)
        BodyScale tibia_r: axes=(X Y Z)
      Measurement femur_r: apply=true
        MarkerPair: markers=(R_HJC r_knee)
        BodyScale femur_r: axes=(X Y Z)
        BodyScale patella_r: axes=(X Y Z)
      Measurement tibia_l: apply=true
        MarkerPair: markers=(L_knee L_ankle)
        MarkerPair: markers=(L_mknee L_mankle)
        BodyScale tibia_l: axes=(X Y Z)
      Measurement femur_l: apply=true
        MarkerPair: markers=(L_HJC L_knee)
        BodyScale femur_l: axes=(X Y Z)
        BodyScale patella_l: axes=(X Y Z)
      Measurement pelvisXY: apply=true
        MarkerPair: markers=(r.ASIS r.PSIS)
        MarkerPair: markers=(L.ASIS L.PSIS)
        BodyScale pelvis: axes=(X Y)
      Measurement pelvisZ: apply=true
        MarkerPair: markers=(L_HJC R_HJC)
        BodyScale pelvis: axes=Z
      Measurement torsoXY: apply=true
        MarkerPair: markers=(R_Shoulder r.PSIS)
        MarkerPair: markers=(L_Shoulder L.PSIS)
        MarkerPair: markers=(C7 r.PSIS)
        MarkerPair: markers=(C7 L.PSIS)
        BodyScale torso: axes=(X Y)
        BodyScale scapulaPhantom_r: axes=(X Y)
        BodyScale scapulaPhantom_l: axes=(X Y)
      Measurement torsoZ: apply=true
        MarkerPair: markers=(R_Shoulder L_Shoulder)
        BodyScale torso: axes=Z
        BodyScale scapulaPhantom_r: axes=Z
        BodyScale scapulaPhantom_l: axes=Z
      Measurement humerus: apply=true
        MarkerPair: markers=(R_Shoulder R_elbow_lat)
        MarkerPair: markers=(R_Shoulder R_elbow_med)
        MarkerPair: markers=(L_Shoulder L_elbow_lat)
        MarkerPair: markers=(L_Shoulder L_elbow_med)
        BodyScale humerus_r: axes=(X Y Z)
        BodyScale humerus_l: axes=(X Y Z)
      Measurement radius: apply=true
        MarkerPair: markers=(R_wrist_ulna R_elbow_lat)
        MarkerPair: markers=(R_wrist_radius R_elbow_med)
        MarkerPair: markers=(L_wrist_ulna L_elbow_lat)
        MarkerPair: markers=(R_wrist_radius L_elbow_med)
        BodyScale ulna_r: axes=(X Y Z)
        BodyScale radius_r: axes=(X Y Z)
        BodyScale hand_r: axes=(X Y Z)
        BodyScale ulna_l: axes=(X Y Z)
        BodyScale radius_l: axes=(X Y Z)
        BodyScale hand_l: axes=(X Y Z)
  MarkerPlacer:
    apply: true
    time_range: 3.41 3.66
    max_marker_movement: -1
    IKTaskSet:
      IKMarkerTask C7: apply=true weight=20
      IKMarkerTask R_Shoulder: apply=true weight=5
      IKMarkerTask L_Shoulder: apply=true weight=5
      IKMarkerTask R_Sternum: apply=true weight=5
      IKMarkerTask L_Sternum: apply=true weight=5
      IKMarkerTask r.ASIS: apply=true weight=10
      IKMarkerTask L.ASIS: apply=true weight=10
      IKMarkerTask r.PSIS: apply=true weight=10
      IKMarkerTask L.PSIS: apply=true weight=10
      IKMarkerTask R_HJC: apply=true weight=20
      IKMarkerTask L_HJC: apply=true weight=20
      IKMarkerTask r_knee: apply=true weight=10
      IKMarkerTask r_mknee: apply=true weight=10
      IKMarkerTask r_ankle: apply=true weight=10
      IKMarkerTask r_mankle: apply=true weight=10
      IKMarkerTask r_toe: apply=true weight=10
      IKMarkerTask r_5meta: apply=true weight=10
      IKMarkerTask r_calc: apply=true weight=10
      IKMarkerTask L_knee: apply=true weight=10
      IKMarkerTask L_mknee: apply=true weight=10
      IKMarkerTask L_ankle: apply=true weight=10
      IKMarkerTask L_mankle: apply=true weight=10
      IKMarkerTask L_toe: apply=true weight=10
      IKMarkerTask L_calc: apply=true weight=10
      IKMarkerTask L_5meta: apply=true weight=10
      IKMarkerTask R_elbow_lat: apply=true weight=1
      IKMarkerTask R_wrist_radius: apply=true weight=5
      IKMarkerTask R_wrist_ulna: apply=true weight=5
      IKMarkerTask L_elbow_lat: apply=true weight=1
      IKMarkerTask L_wrist_radius: apply=true weight=5
      IKMarkerTask L_wrist_ulna: apply=true weight=5
      IKCoordinateTask [values shared by the 13 below unless stated]: apply=true weight=0.1 value_type=manual_value
          value=0
      IKCoordinateTask hip_flexion_r
      IKCoordinateTask hip_rotation_r: apply=false
      IKCoordinateTask knee_angle_r
      IKCoordinateTask knee_adduction_r
      IKCoordinateTask ankle_angle_r: value=0.08726646
      IKCoordinateTask hip_flexion_l
      IKCoordinateTask hip_rotation_l: apply=false
      IKCoordinateTask knee_angle_l
      IKCoordinateTask knee_adduction_l
      IKCoordinateTask ankle_angle_l: value=0.08726646
      IKCoordinateTask lumbar_extension
      IKCoordinateTask lumbar_bending
      IKCoordinateTask lumbar_rotation
