# OpenSim document version 40000
ScaleTool RajagopalModified2016_withArms:
  mass: 75.337 [kg]
  height: 1.89
  age: -1
  ModelScaler:
    apply: true
    scaling_order: measurements
    time_range: 3.41 3.66
    preserve_mass_distribution: true
    MeasurementSet:
      Measurement foot: apply=true
        MarkerPair: markers=(RHeel RSmallToe)
        MarkerPair: markers=(RHeel RBigToe)
        MarkerPair: markers=(LHeel LSmallToe)
        MarkerPair: markers=(LHeel LBigToe)
        BodyScale talus_r: axes=(X Y Z)
        BodyScale calcn_r: axes=(X Y Z)
        BodyScale toes_r: axes=(X Y Z)
        BodyScale talus_l: axes=(X Y Z)
        BodyScale calcn_l: axes=(X Y Z)
        BodyScale toes_l: axes=(X Y Z)
      Measurement tibia_r: apply=true
        MarkerPair: markers=(RKnee RAnkle)
        BodyScale tibia_r: axes=(X Y Z)
      Measurement femur_r: apply=true
        MarkerPair: markers=(RHJC_study RKnee)
        BodyScale femur_r: axes=(X Y Z)
        BodyScale patella_r: axes=(X Y Z)
      Measurement tibia_l: apply=true
        MarkerPair: markers=(LKnee LAnkle)
        BodyScale tibia_l: axes=(X Y Z)
      Measurement femur_l: apply=true
        MarkerPair: markers=(LHJC_study LKnee)
        BodyScale femur_l: axes=(X Y Z)
        BodyScale patella_l: axes=(X Y Z)
      Measurement pelvisXY: apply=true
        MarkerPair: markers=(r.ASIS_study r.PSIS_study)
        MarkerPair: markers=(L.ASIS_study L.PSIS_study)
        BodyScale pelvis: axes=(X Y)
      Measurement pelvisZ: apply=true
        MarkerPair: markers=(RHJC_study LHJC_study)
        BodyScale pelvis: axes=Z
      Measurement torsoXY: apply=true
        MarkerPair: markers=(r_shoulder_study r.PSIS_study)
        MarkerPair: markers=(L_shoulder_study L.PSIS_study)
        MarkerPair: markers=(C7_study r.PSIS_study)
        MarkerPair: markers=(C7_study L.PSIS_study)
        BodyScale torso: axes=(X Y)
      Measurement torsoZ: apply=true
        MarkerPair: markers=(r_shoulder_study L_shoulder_study)
        BodyScale torso: axes=Z
      Measurement humerus: apply=true
        MarkerPair: markers=(r_shoulder_study r_lelbow_study)
        MarkerPair: markers=(r_shoulder_study r_melbow_study)
        MarkerPair: markers=(L_shoulder_study L_lelbow_study)
        MarkerPair: markers=(L_shoulder_study L_melbow_study)
        BodyScale humerus_r: axes=(X Y Z)
        BodyScale humerus_l: axes=(X Y Z)
      Measurement radius: apply=true
        MarkerPair: markers=(r_lwrist_study r_lelbow_study)
        MarkerPair: markers=(r_mwrist_study r_melbow_study)
        MarkerPair: markers=(L_lwrist_study L_lelbow_study)
        MarkerPair: markers=(L_mwrist_study L_melbow_study)
        BodyScale ulna_r: axes=(X Y Z)
        BodyScale radius_r: axes=(X Y Z)
        BodyScale hand_r: axes=(X Y Z)
        BodyScale ulna_l: axes=(X Y Z)
        BodyScale radius_l: axes=(X Y Z)
        BodyScale hand_l: axes=(X Y Z)
  MarkerPlacer:
    apply: true
    time_range: 3.41 3.66
    max_marker_movement: -1
    IKTaskSet:
      IKMarkerTask r.ASIS_study: apply=true weight=10
      IKMarkerTask L.ASIS_study: apply=true weight=10
      IKMarkerTask r.PSIS_study: apply=true weight=10
      IKMarkerTask L.PSIS_study: apply=true weight=10
      IKMarkerTask RHJC_study: apply=true weight=10
      IKMarkerTask LHJC_study: apply=true weight=10
      IKMarkerTask RKnee: apply=true weight=10
      IKMarkerTask RAnkle: apply=true weight=10
      IKMarkerTask RHeel: apply=true weight=10
      IKMarkerTask RSmallToe: apply=true weight=10
      IKMarkerTask RBigToe: apply=true weight=10
      IKMarkerTask LKnee: apply=true weight=10
      IKMarkerTask LAnkle: apply=true weight=10
      IKMarkerTask LHeel: apply=true weight=10
      IKMarkerTask LSmallToe: apply=true weight=10
      IKMarkerTask LBigToe: apply=true weight=10
      IKMarkerTask r_shoulder_study: apply=true weight=5
      IKMarkerTask L_shoulder_study: apply=true weight=5
      IKMarkerTask C7_study: apply=true weight=20
      IKMarkerTask r_lelbow_study: apply=true weight=1
      IKMarkerTask r_lwrist_study: apply=true weight=5
      IKMarkerTask r_mwrist_study: apply=true weight=5
      IKMarkerTask L_lelbow_study: apply=true weight=1
      IKMarkerTask L_lwrist_study: apply=true weight=5
      IKMarkerTask L_mwrist_study: apply=true weight=5
      IKCoordinateTask [values shared by the 11 below unless stated]: apply=true weight=0.1 value_type=manual_value
          value=0
      IKCoordinateTask hip_flexion_r
      IKCoordinateTask hip_rotation_r: apply=false
      IKCoordinateTask knee_angle_r
      IKCoordinateTask ankle_angle_r: value=0.08726646
      IKCoordinateTask hip_flexion_l
      IKCoordinateTask hip_rotation_l: apply=false
      IKCoordinateTask knee_angle_l
      IKCoordinateTask ankle_angle_l: value=0.08726646
      IKCoordinateTask lumbar_extension
      IKCoordinateTask lumbar_bending
      IKCoordinateTask lumbar_rotation
